// COMSOL Multiphysics 5.4.0.388 model "kapacitivost1.mph"
// Outline of the model tree

Geometry
  geom1 "Geometry 1" (2D axisymmetric, length unit km)
    c1: Circle | r = 6371
    c2: Circle | r = 6471
    dif1: Difference | input = c2; input2 = c1
    fin: Finalize "Form Union"

Materials
  mat1: Common "Material 1" on all domains
    def "Basic"
      relpermittivity = 1

Physics
  es: Electrostatics on all domains
    dependent variable V
    ccn1: ChargeConservation (default)
    axi1: AxialSymmetry (default)
    zc1: ZeroCharge (default)
    init1: init "Initial Values 1" (default)
    gnd1: Ground on boundaries 4, 5
    term1: Terminal on boundaries 3, 6 | TerminalType = Voltage; V0 = 5e5

Mesh
  mesh1 "Mesh 1" (physics-controlled)

Studies
  std1 "Study 1"
    stat: Stationary

Solver configurations
  sol1 "Solution 1" (study std1)
    v1: Variables "Dependent Variables 1"
    s1: Stationary "Stationary Solver 1"
      dDef: Direct
      fc1: FullyCoupled | linsolver = dDef

Datasets
  dset1: Solution | solution = sol1
  rev1: Revolve2D "Revolution 2D 1" | data = dset1
  cln1: CutLine2D | data = dset1; genpoints = {{6371, 0}, {6471, 0}}

Derived values
  gev1: EvalGlobal "Global Evaluation 1"
    data = dset1
    table = tbl1
    expr = {es.C11, es.Q0_1, es.V0_1, es.Q0_1/es.V0_1}
    descr = {Maxwell capacitance, Terminal charge, Terminal voltage, }

Tables
  tbl1: Table
    // Global Evaluation 1 (es.C11)
    Maxwell capacitance (F) | Terminal charge (C) | Terminal voltage (V) | es.Q0_1/es.V0_1 (F)
    0.0458709 | 22935.5 | 500000 | 0.0458709

Plots
  pg1: PlotGroup2D "Electric Potential (es)" | data = dset1
    surf1: Surface | expr = V
    arws1: ArrowSurface | expr = {es.Er, es.Ez}; arrowlength = normalized
  pg2: PlotGroup3D "Electric Potential, Revolved Geometry (es)" | data = rev1
    surf1: Surface | expr = V
  pg3: PlotGroup1D "1D Plot Group 3" | data = dset1
    lngr1: LineGraph | data = cln1; expr = V; descr = Electric potential; xdata = expr; xdataexpr = r
    lngr2: LineGraph | data = cln1; expr = es.normE; xdata = expr; xdataexpr = r
  pg4: PlotGroup3D "3D Plot Group 4" | data = rev1
    arwv1: ArrowVolume | revcoordsys = cylindrical; expr = {es.Er, es.Ephi, es.Ez}; arrowlength = logarithmic