// COMSOL Multiphysics 5.4.0.388 model "struje1.mph"
// Outline of the model tree

Geometry
  geom1 "Geometry 1" (2D axisymmetric, length unit km)
    c1: Circle | r = 6371
    c2: Circle | r = 6471
    dif1: Difference | input = c2; input2 = c1
    fin: Finalize "Form Union"

Materials
  mat1: Common "Material 1" on all domains
    def "Basic"
      electricconductivity = 1e-11
      relpermittivity = 1

Physics
  ec: ConductiveMedia "Electric Currents" on all domains
    dependent variable V
    cucn1: CurrentConservation (default)
    axi1: AxialSymmetry (default)
    ein1: ElectricInsulation (default)
    init1: init "Initial Values 1" (default)
    gnd1: Ground on boundaries 4, 5
    term1: Terminal on boundaries 3, 6 | TerminalType = Voltage; V0 = 5e5

Mesh
  mesh1 "Mesh 1" (physics-controlled)

Studies
  std1 "Study 1"
    stat: Stationary

Solver configurations
  sol1 "Solution 1" (study std1)
    v1: Variables "Dependent Variables 1"
    s1: Stationary "Stationary Solver 1"
      dDef: Direct
      fc1: FullyCoupled | linsolver = dDef

Datasets
  dset1: Solution | solution = sol1
  rev1: Revolve2D "Revolution 2D 1" | data = dset1

Derived values
  gev1: EvalGlobal "Global Evaluation 1"
    data = dset1
    table = tbl1
    expr = {ec.I0_1, ec.I0_1/(4*pi*(6371*1e3)^2)}
    descr = {Terminal current, }

Tables
  tbl1: Table
    // Global Evaluation 1 (ec.I0_1)
    Terminal current (A) | ec.I0_1/(4*pi*(6371*1e3)^2) (A)
    25903.5 | 5.07848e-11

Plots
  pg1: PlotGroup2D "Electric Potential (ec)" | data = dset1
    surf1: Surface | expr = V
  pg2: PlotGroup3D "Electric Potential, Revolved Geometry (ec)" | data = rev1
    surf1: Surface | expr = V
  pg3: PlotGroup3D "3D Plot Group 3" | data = rev1
    arwv1: ArrowVolume (disabled) | revcoordsys = cylindrical; expr = {ec.Jr, ec.Jphi, ec.Jz}; arrowlength = normalized
    arws1: ArrowSurface | revcoordsys = cylindrical; expr = {ec.Jr, ec.Jphi, ec.Jz}